// COMSOL Multiphysics 6.3.0.420 model "masterarbeit_marc.mph"
// Outline of the model tree

Parameters
  N1 = 30
  N2 = 20

Geometry
  geom1 "Geometry 1" (2D, length unit m)
    sq1: Square
    c1: Circle | r = 0.1; angle = 90; iscircularsectorold = on
    dif1: Difference | input = sq1; input2 = c1
    fin: Finalize "Form Union"

Materials
  mat4: Common "Material 4" on domains 1
    def: def "Basic"
      density = 1
    Enu: Enu "Young's modulus and Poisson's ratio"
      E = 26.66
      nu = 0.33

Physics
  solid: SolidMechanics on all domains
    dependent variable u = {u, v, w}
    Type2D.Type2D = PlaneStrain
    Type2D.ModeExtension = 0
    Type2D.enable_bending = 1
    d.d = 0.01
    StructuralTransientBehavior.StructuralTransientBehavior = IncludeInertia
    lemm1: LinearElasticModel "Linear Elastic Material 1" (default)
      SolidModel = Isotropic
      IsotropicOption = Lame
      geometricNonlinearity = totalLagrangian
      reducedIntegration = 0
    free1: Free (default)
    init1: init "Initial Values 1" (default)
    hmm1: HyperelasticModel "Hyperelastic Material 1" on domains 1
      MaterialModel = NeoHookean
      VolumetricEnergyCoupled = simoPister
      VolumetricEnergyUncoupled = logarithmic
      WsvolUncoupled = 0.5*lambda*(log(solid.J))^2 - mu*log(solid.J)
      MixedFormulation = none
      IsotropicOption = Lame
      Compressibility_NeoHookean = Compressible
      Compressibility_SaintVenantKirchhoff = Compressible
      lambLame_mat = from_mat
      muLame_mat = from_mat
    disp1: Displacement1 "Prescribed Displacement 1" on boundaries 3 | Direction = {free, prescribed, free}
    disp2: Displacement1 "Prescribed Displacement 2" on boundaries 1 | Direction = {prescribed, free, free}
    bndl1: BoundaryLoad on boundaries 4
      forceType = ForceArea
      forceReferenceArea = {N1, 0, 0}
      forceDeformedArea = {10, 0, 0}
      forceReferenceLength = {10, 0, 0}
      forceDeformedLength = {10, 0, 0}
      force = {10, 0, 0}
      coordinateSystem = GlobalSystem
    bndl2: BoundaryLoad on boundaries 2
      forceType = ForceArea
      forceReferenceArea = {0, N2, 0}
      forceDeformedArea = {0, 5, 0}
      forceReferenceLength = {0, 5, 0}
      forceDeformedLength = {0, 5, 0}
      force = {0, 5, 0}

Mesh
  mesh1 "Mesh 1"
    size: MeshSizeDefault | hauto = 2
    ftri1: FreeTri "Free Triangular 1" (disabled) on remaining entities | smoothmaxiter = 4; smoothmaxdepth = 4
    edg1: Edge on boundaries 5 | smoothmaxiter = 4
      dis1: Distribution on boundaries 5 | numelem = 50
    fq1: FreeQuad on remaining entities

Studies
  std1 "Study 1"
    stat: Stationary

Solver configurations
  sol1 "Solution 1" (study std1)
    v1: Variables "Dependent Variables 1"
    s1: Stationary "Stationary Solver 1" | nonlin = on
      dDef: Direct
      fc1: FullyCoupled | dtech = hnlin; maxiter = 250

Datasets
  dset1: Solution | solution = sol1

Plots
  pg4: PlotGroup2D "Stress in xx" | data = dset1
    surf1: Surface | expr = solid.sGpxx; descr = Stress tensor, xx-component
  pg10: PlotGroup2D "First piola xx" | data = dset1
    surf1: Surface | expr = solid.PGpxX; descr = First Piola–Kirchhoff stress, xX-component
  pg11: PlotGroup2D "Second Piola xx" | data = dset1
    surf1: Surface | expr = solid.SGpYY; descr = Second Piola–Kirchhoff stress, YY-component
  pg2: PlotGroup2D "displacement x" | data = dset1
    surf1: Surface | data = dset1; expr = u
      def1: Deform "Deformation 1" | expr = {u, v}
  pg3: PlotGroup2D "displacement y" | data = dset1
    surf1: Surface | data = dset1; expr = v; descr = Displacement field, Y-component
      def1: Deform "Deformation 1" | expr = {u, v}
  pg5: PlotGroup2D "Stress in xy" | data = dset1
    surf1: Surface | expr = solid.sGpxy; descr = Stress tensor, xy-component
  pg6: PlotGroup2D "Stress in yy" | data = dset1
    surf1: Surface | expr = solid.sGpyy; descr = Stress tensor, yy-component
  pg7: PlotGroup2D "epsilon x" | data = dset1
    surf1: Surface | expr = solid.eXX; descr = Strain tensor, XX-component
  pg8: PlotGroup2D "epsilon xy" | data = dset1
    surf1: Surface | expr = solid.eXY; descr = Strain tensor, XY-component
  pg9: PlotGroup2D "epsilon yy" | data = dset1
    surf1: Surface | expr = solid.eYY; descr = Strain tensor, YY-component

Exports
  data1: Data
    data = dset1
    expr = {solid.sGpxx, solid.sGpyy, solid.sGpxy, solid.eXX, solid.eYY, solid.eXY, u, v, solid.PGpxX, solid.PGpyY, solid.PGpxY, solid.SGpXX, solid.SGpYY, solid.SGpXY}
    unit = {N/m^2, N/m^2, N/m^2, 1, 1, 1, m, m, N/m^2, N/m^2, N/m^2, N/m^2, N/m^2, N/m^2}
    descr = {"Stress tensor, xx-component", "Stress tensor, yy-component", "Stress tensor, xy-component", "Strain tensor, XX-component", "Strain tensor, YY-component", "Strain tensor, XY-component", "Displacement field, X-component", "Displacement field, Y-component", "First Piola–Kirchhoff stress, xX-component", "First Piola–Kirchhoff stress, yY-component", "First Piola–Kirchhoff stress, xY-component", "Second Piola–Kirchhoff stress, XX-component", "Second Piola–Kirchhoff stress, YY-component", "Second Piola–Kirchhoff stress, XY-component"}
    filename = C:\Users\marcschw\Downloads\Hooke_hole-uncoupled-log-4-2.txt
    separator = ,